*Heading
** Job name: Job-1-example Model name: Model-1
** Generated by: Abaqus/CAE 6.14-2
*Preprint, echo=NO, model=NO, history=NO, contact=NO
**
** PARTS
**
*Part, name=Part-1
*Node
      1,          50.,          50.,          50.
      2,          50.,          45.,          50.
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*Element, type=C3D8
   1,  122,  123,  134,  133,    1,    2,   13,   12
   2,  123,  124,  135,  134,    2,    3,   14,   13
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*Nset, nset=Set-1, generate
    1,  1331,     1
*Elset, elset=Set-1, generate
    1,  1000,     1
** Section: Section-1
*Solid Section, elset=Set-1, material=Material-1
,
*End Part
**
**
** ASSEMBLY
**
*Assembly, name=Assembly
**
*Instance, name=Part-1-1, part=Part-1
*End Instance
**
*Nset, nset=Set-1, instance=Part-1-1, generate
   11,  1331,    11
*Elset, elset=Set-1, instance=Part-1-1, generate
   10,  1000,    10
*Nset, nset=Set-2, instance=Part-1-1, generate
 1211,  1331,     1
*Elset, elset=Set-2, instance=Part-1-1, generate
  901,  1000,     1
*Nset, nset=Set-3, instance=Part-1-1
  111,  112,  113,  114,  115,  116
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*Elset, elset=Set-3, instance=Part-1-1
   91,   92,   93,   94,   95,   96
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*Nset, nset=Set-4, instance=Part-1-1, generate
   11,  1331,    11
*Elset, elset=Set-4, instance=Part-1-1, generate
   10,  1000,    10
*Nset, nset=Set-5, instance=Part-1-1, generate
   11,  1331,    11
*Elset, elset=Set-5, instance=Part-1-1, generate
   10,  1000,    10
*Nset, nset=Set-6, instance=Part-1-1, generate
   11,  1331,    11
*Elset, elset=Set-6, instance=Part-1-1, generate
   10,  1000,    10
*Nset, nset=Set-7, instance=Part-1-1
  111,  112,  113,  114,  115,  116
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*Elset, elset=Set-7, instance=Part-1-1
   91,   92,   93,   94,   95,   96
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*Nset, nset=Set-8, instance=Part-1-1, generate
 1211,  1331,     1
*Elset, elset=Set-8, instance=Part-1-1, generate
  901,  1000,     1
*Elset, elset=_Surf-1_S6, internal, instance=Part-1-1, generate
   1,  991,   10
*Surface, type=ELEMENT, name=Surf-1
_Surf-1_S6, S6
*End Assembly
**
** MATERIALS
**
*Material, name=Material-1
*Density
1000.,
*Elastic
1000., 0.3
**
** BOUNDARY CONDITIONS
**
** Name: BC-1 Type: Displacement/Rotation
*Boundary
Set-6, 2, 2
** Name: BC-2 Type: Displacement/Rotation
*Boundary
Set-7, 3, 3
** Name: BC-3 Type: Displacement/Rotation
*Boundary
Set-8, 1, 1
** ----------------------------------------------------------------
**
** STEP: Step-1
**
*Step, name=Step-1, nlgeom=NO, perturbation
*Static
**
** LOADS
**
** Name: Load-1   Type: Pressure
*Dsload
Surf-1, P, 1.
**
** OUTPUT REQUESTS
**
**
** FIELD OUTPUT: F-Output-1
**
*Output, field, variable=PRESELECT
**
** HISTORY OUTPUT: H-Output-1
**
*Output, history, variable=PRESELECT
*End Step
** ----------------------------------------------------------------
**
** STEP: Step-2
**
*Step, name=Step-2, nlgeom=NO, perturbation
*Frequency, eigensolver=Lanczos, acoustic coupling=on, normalization=displacement
10, , , , ,
**
** OUTPUT REQUESTS
**
*Restart, write, frequency=0
**
** FIELD OUTPUT: F-Output-2
**
*Output, field, variable=PRESELECT
*End Step
